!!! Base displacement
!!! +++---

/solu
antype,0
prefix='BaseDisp1'

time,1
nlgeom,on
sstif,on

!!! ------------------Add loads------------------------
esel,all
acel,,9.8,,

/input, '1_base_displacement', 'mac', 'C:\Users\xuchi\Desktop\JiashaoBridge\model\LoadFiles'

d,3001,uy,-0.2
d,3051,uy,-0.2
d,3101,uy,-0.2
d,3151,uy,0.2
d,3201,uy,0.2
d,3251,uy,0.2
allsel,all
solve

!!! ------------------Export results-------------------
/input, 'output_images', 'mac', 'C:\Users\xuchi\Desktop\JiashaoBridge\model'
