!!! Temp rise

/solu
antype,0
prefix='TempRise'

!!! Loads
uniform_temp_rise=20

time,1
nlgeom,on
sstif,on

!!! ------------------Add loads------------------------
esel,all
acel,,9.8,,
tref,0
bfe,girders,temp,,uniform_temp_rise
/pbf,temp,,1
eplot
allsel,all
solve

!!! ------------------Export results-------------------
/input, 'output_images', 'mac', 'C:\Users\xuchi\Desktop\JiashaoBridge\model'
