!!! Load condition 1 and its corresponding solve

/solu
antype,0
prefix='Cnd1'

uniform_temp_rise=20
uniform_temp_down=-20

time,1
nlgeom,on
sstif,on

!!! ------------------Add loads------------------------
esel,all
acel,,9.8,,
tref,0
bfe,girders,temp,,uniform_temp_rise
/pbf,temp,,1
eplot
allsel,all
solve
