!!! Load condition 1_2
!!! Dead load + base displacement 2 + traffic load

/solu
antype,0
prefix='Cnd1_2'

time,1
nlgeom,on
sstif,on

!!! ------------------Add loads------------------------
esel,all
acel,,9.8,,

/input, '2_base_displacement', 'mac', 'C:\Users\xuhui\Desktop\JiashaoBridge\model\LoadFiles'
/input, '5_traffic_load_for_combination', 'mac', 'C:\Users\xuhui\Desktop\JiashaoBridge\model\LoadFiles'

eplot
allsel,all
solve

!!! ------------------Export results-------------------
/input, 'output_images', 'mac', 'C:\Users\xuhui\Desktop\JiashaoBridge\model'
